*Heading
** Job name: Pressure_Box_With_Holes Model name: Model-1
** Generated by: Abaqus/CAE 2019
*Preprint, echo=NO, model=NO, history=NO, contact=NO
**
** PARTS
**
*Part, name=Bottom
*Node
      1,  0.524358988,  0.365513235,           0.
      2,  0.524358988,  0.340513229,           0.
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*Element, type=S4R
1, 1, 2, 3, 4
2, 5, 6, 7, 8
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*Nset, nset=Bottom_Plate, generate
  1,  78,   1
*Elset, elset=Bottom_Plate, generate
  1,  60,   1
** Section: Bottom_Section
*Shell Section, elset=Bottom_Plate, material=Steel
0.013, 5
*End Part
**
*Part, name=Cap
*Node
      1, -0.430492133, -0.284673691,           0.
      2, -0.469252139, -0.284673691,           0.
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*Element, type=S4R
1, 1, 2, 3, 4
2, 5, 6, 7, 8
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*Nset, nset=Cap, generate
   1,  162,    1
*Elset, elset=Cap, generate
   1,  136,    1
** Section: Cap_Section
*Shell Section, elset=Cap, material=Aluminum-6061, offset=SPOS
0.0254, 5
*End Part
**
*Part, name=Long_Side
*Node
      1,           0.,           0.,           0.
      2, 0.0500000007,           0.,           0.
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*Element, type=S4R
 1,   1,   2,  18,  17
 2,   2,   3,  19,  18
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*Nset, nset="Long Side", generate
   1,  112,    1
*Elset, elset="Long Side", generate
  1,  90,   1
** Section: Bottom_Section
*Shell Section, elset="Long Side", material=Steel
0.013, 5
*End Part
**
*Part, name="Short Side"
*Node
      1,           0.,           0.,           0.
      2, 0.0508333333,           0.,           0.
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*Element, type=S4R
 1,  1,  2,  9,  8
 2,  2,  3, 10,  9
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*Nset, nset=Side, generate
  1,  49,   1
*Elset, elset=Side, generate
  1,  36,   1
** Section: Bottom_Section
*Shell Section, elset=Side, material=Steel
0.013, 5
*End Part
**
*Part, name="Short Side With Holes"
*Node
      1,  0.229641616,  0.146339595,           0.
      2,  0.226780325,  0.165568188,           0.
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*Element, type=S3
1,   4,  54,   5
2,  56,  93,  42
3,  54,  51,   5
4,  79,  68, 101
*Element, type=S4R
 5,  28,  56,  80,  29
 6,  56,  28,  27,  77
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*Nset, nset=Side, generate
   1,  102,    1
*Elset, elset=Side, generate
  1,  85,   1
** Section: Bottom_Section
*Shell Section, elset=Side, material=Steel
0.013, 5
*End Part
**
**
** ASSEMBLY
**
*Assembly, name=Assembly
**
*Instance, name=Long_Side-1, part=Long_Side
-0.0037497179251359, 0.268125243233336,    -0.268125
-0.0037497179251359, 0.268125243233336,    -0.268125, 0.996250294762916, 0.268125243233336,    -0.268125, 89.9999992730282
*End Instance
**
*Instance, name="Short Side-1", part="Short Side"
-0.0037497179251359, -0.0368747567666645,    -0.268125
-0.0037497179251359, -0.0368747567666645,    -0.268125, -0.0037497179251359, -1.03687476945472,    -0.268125, 89.9999992730282
*End Instance
**
*Instance, name=Long_Side-2, part=Long_Side
-0.0037497179251359, -0.0368747567666645,     0.036875
-0.0037497179251359, -0.0368747567666645,     0.036875, -1.00374973061319, -0.0368747567666646,     0.036875, 89.9999992730282
*End Instance
**
*Instance, name=Bottom-1, part=Bottom
0.221891307715888,    -0.072388,     0.036875
*End Instance
**
*Instance, name=Cap-1, part=Cap
0.426742420956601, 0.247798928594666,    -0.268125
*End Instance
**
*Instance, name="Short Side With Holes-1", part="Short Side With Holes"
0.746250282074864, 0.268125243233336,     0.036875
0.746250282074864, 0.268125243233336,     0.036875, 0.168900012885238, 0.845475512422961, -0.540475269189626,         120.
*End Instance
**
*Nset, nset=Bottom_Edges_Interaction, instance=Long_Side-1, generate
  1,  16,   1
*Nset, nset=Bottom_Edges_Interaction, instance="Short Side-1", generate
 1,  7,  1
*Nset, nset=Bottom_Edges_Interaction, instance=Long_Side-2, generate
  1,  16,   1
*Elset, elset=Bottom_Edges_Interaction, instance=Long_Side-1, generate
  1,  15,   1
*Elset, elset=Bottom_Edges_Interaction, instance="Short Side-1", generate
 1,  6,  1
*Elset, elset=Bottom_Edges_Interaction, instance=Long_Side-2, generate
  1,  15,   1
*Nset, nset=Set-8, instance=Bottom-1
  1,  3,  4,  5,  7,  8
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*Elset, elset=Set-8, instance=Bottom-1, generate
  1,  30,   1
*Nset, nset=m_Set-15, instance=Long_Side-1, generate
   1,  112,    1
*Nset, nset=m_Set-15, instance=Long_Side-2, generate
   1,  112,    1
*Elset, elset=m_Set-15, instance=Long_Side-1, generate
  1,  90,   1
*Elset, elset=m_Set-15, instance=Long_Side-2, generate
  1,  90,   1
*Nset, nset=m_Set-22, instance="Short Side-1", generate
  1,  49,   1
*Nset, nset=m_Set-22, instance="Short Side With Holes-1", generate
   1,  102,    1
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*Nset, nset=s_Set-14, instance=Long_Side-1, generate
   1,  112,    1
*Nset, nset=s_Set-14, instance="Short Side-1", generate
  1,  49,   1
*Nset, nset=s_Set-14, instance=Long_Side-2, generate
   1,  112,    1
*Nset, nset=s_Set-14, instance="Short Side With Holes-1", generate
   1,  102,    1
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*Nset, nset=s_Set-22, instance=Long_Side-1, generate
   1,  112,    1
*Nset, nset=s_Set-22, instance=Long_Side-2, generate
   1,  112,    1
*Elset, elset=s_Set-22, instance=Long_Side-1, generate
  1,  90,   1
*Elset, elset=s_Set-22, instance=Long_Side-2, generate
  1,  90,   1
*Elset, elset=_Bottom_master_surface_SNEG, internal, instance=Bottom-1, generate
  1,  60,   1
*Surface, type=ELEMENT, name=Bottom_master_surface
_Bottom_master_surface_SNEG, SNEG
*Elset, elset="_Side 1 slave surface_", internal, instance=Long_Side-1, generate
  1,  90,   1
*Elset, elset="_Side 1 slave surface_", internal, instance="Short Side-1", generate
  1,  36,   1
*Elset, elset="_Side 1 slave surface_", internal, instance=Long_Side-2, generate
  1,  90,   1
*Elset, elset="_Side 1 slave surface_", internal, instance="Short Side With Holes-1", generate
  1,  85,   1
*Surface, type=ELEMENT, name="Side 1 slave surface"
"_Side 1 slave surface_",
*Elset, elset=_Side_Pressure_Surface_SPOS, internal, instance=Long_Side-1, generate
  1,  90,   1
*Elset, elset=_Side_Pressure_Surface_SPOS, internal, instance=Long_Side-2, generate
  1,  90,   1
*Elset, elset=_Side_Pressure_Surface_SNEG, internal, instance="Short Side-1", generate
  1,  36,   1
*Elset, elset=_Side_Pressure_Surface_SNEG, internal, instance="Short Side With Holes-1", generate
  1,  85,   1
*Surface, type=ELEMENT, name=Side_Pressure_Surface
_Side_Pressure_Surface_SPOS, SPOS
_Side_Pressure_Surface_SNEG, SNEG
*Elset, elset=_Surf-13_SNEG, internal, instance=Long_Side-2, generate
  1,  90,   1
*Surface, type=ELEMENT, name=Surf-13
_Surf-13_SNEG, SNEG
*Elset, elset=_Surf-14_SPOS, internal, instance="Short Side-1", generate
  1,  36,   1
*Surface, type=ELEMENT, name=Surf-14
_Surf-14_SPOS, SPOS
*Elset, elset=_Surf-15_SPOS, internal, instance=Cap-1, generate
  47,  136,    1
*Surface, type=ELEMENT, name=Surf-15
_Surf-15_SPOS, SPOS
*Elset, elset=_Surf-39_SNEG, internal, instance=Bottom-1, generate
 31,  60,   1
*Surface, type=ELEMENT, name=Surf-39
_Surf-39_SNEG, SNEG
*Elset, elset=_m_Surf-31_, internal, instance="Short Side-1", generate
  1,  36,   1
*Elset, elset=_m_Surf-31_, internal, instance="Short Side With Holes-1", generate
  1,  85,   1
*Surface, type=ELEMENT, name=m_Surf-31
_m_Surf-31_,
*Elset, elset=_m_Surf-37_, internal, instance=Bottom-1, generate
  1,  60,   1
*Surface, type=ELEMENT, name=m_Surf-37
_m_Surf-37_,
*Elset, elset=_m_Surf-45_SNEG, internal, instance="Short Side-1", generate
  1,  36,   1
*Surface, type=ELEMENT, name=m_Surf-45
_m_Surf-45_SNEG, SNEG
*Elset, elset=_m_Surf-47_, internal, instance=Cap-1, generate
   1,  136,    1
*Surface, type=ELEMENT, name=m_Surf-47
_m_Surf-47_,
*Elset, elset=_s_Surf-31_, internal, instance=Long_Side-1, generate
  1,  90,   1
*Elset, elset=_s_Surf-31_, internal, instance=Long_Side-2, generate
  1,  90,   1
*Surface, type=ELEMENT, name=s_Surf-31
_s_Surf-31_,
*Elset, elset=_s_Surf-37_, internal, instance=Long_Side-1, generate
  1,  90,   1
*Elset, elset=_s_Surf-37_, internal, instance="Short Side-1", generate
  1,  36,   1
*Elset, elset=_s_Surf-37_, internal, instance=Long_Side-2, generate
  1,  90,   1
*Elset, elset=_s_Surf-37_, internal, instance="Short Side With Holes-1", generate
  1,  85,   1
*Surface, type=ELEMENT, name=s_Surf-37
_s_Surf-37_,
*Elset, elset=_s_Surf-45_SPOS, internal, instance=Long_Side-1, generate
  1,  90,   1
*Elset, elset=_s_Surf-45_SPOS, internal, instance=Long_Side-2, generate
  1,  90,   1
*Surface, type=ELEMENT, name=s_Surf-45
_s_Surf-45_SPOS, SPOS
*Elset, elset=_s_Surf-47_, internal, instance=Long_Side-1, generate
  1,  90,   1
*Elset, elset=_s_Surf-47_, internal, instance="Short Side-1", generate
  1,  36,   1
*Elset, elset=_s_Surf-47_, internal, instance=Long_Side-2, generate
  1,  90,   1
*Elset, elset=_s_Surf-47_, internal, instance="Short Side With Holes-1", generate
  1,  85,   1
*Surface, type=ELEMENT, name=s_Surf-47
_s_Surf-47_,
*Surface, type=NODE, name=Bottom-1_Bottom_Plate_CNS_, internal
Bottom-1.Bottom_Plate, 1.
*Surface, type=NODE, name=s_Set-14_CNS_, internal
s_Set-14, 1.
*Surface, type=NODE, name=m_Set-22_CNS_, internal
m_Set-22, 1.
*Surface, type=NODE, name=s_Set-22_CNS_, internal
s_Set-22, 1.
** Constraint: Bottom to Sides
*Tie, name="Bottom to Sides", adjust=yes, no rotation
s_Set-14_CNS_, Bottom-1_Bottom_Plate_CNS_
** Constraint: Cap to sides
*Tie, name="Cap to sides", adjust=yes, no rotation
s_Surf-47, m_Surf-47
** Constraint: Constraint-8
*Tie, name=Constraint-8, adjust=yes, no rotation
s_Set-22_CNS_, m_Set-22_CNS_
** Constraint: Sides to sides
*Tie, name="Sides to sides", adjust=yes, no rotation
s_Surf-45, m_Surf-45
*End Assembly
**
** MATERIALS
**
*Material, name=Aluminum-6061
*Density
2710.,
*Elastic
 7e+10, 0.33
*Material, name=Steel
*Density
7850.,
*Elastic
 2e+11, 0.3
**
** INTERACTION PROPERTIES
**
*Surface Interaction, name=IntProp-1
1.,
*Friction
0.,
**
** INTERACTIONS
**
** Interaction: Bottom to sides 1
*Contact Pair, interaction=IntProp-1, type=SURFACE TO SURFACE
"Side 1 slave surface", Bottom_master_surface
** Interaction: Sides to Cap
*Contact Pair, interaction=IntProp-1, type=SURFACE TO SURFACE
s_Surf-37, m_Surf-37
** Interaction: Sides to sides
*Contact Pair, interaction=IntProp-1, type=SURFACE TO SURFACE
s_Surf-31, m_Surf-31
** ----------------------------------------------------------------
**
** STEP: Step-1
**
*Step, name=Step-1, nlgeom=NO
*Static
1., 1., 1e-05, 1.
**
** BOUNDARY CONDITIONS
**
** Name: BC-1 Type: Displacement/Rotation
*Boundary
Set-8, 1, 1
Set-8, 2, 2
Set-8, 3, 3
**
** LOADS
**
** Name: Bottom_Pressure   Type: Pressure
*Dsload
Surf-39, P, 102000.
** Name: Cap_Pressure   Type: Pressure
*Dsload
Surf-15, P, 102000.
** Name: Sides_Pressure   Type: Pressure
*Dsload
Side_Pressure_Surface, P, 102000.
**
** OUTPUT REQUESTS
**
*Restart, write, frequency=0
**
** FIELD OUTPUT: F-Output-1
**
*Output, field, variable=PRESELECT
**
** HISTORY OUTPUT: H-Output-1
**
*Output, history, variable=PRESELECT
*End Step
